// COMSOL Multiphysics 6.0.0.318 model "SymmetricNotch.mph"
// Outline of the model tree

Parameters
  thickness = 0.001[m]  // Specimen thickness
  width = 0.018[m]  // Specimen width
  Kb = 71660[MPa]  // Bulk modulus
  Mu = 27280[MPa]  // Shear modulus
  Sigma_y = 345[MPa]  // Yielding stress
  Hm = 250[MPa]  // Hardening modulus
  Gc0 = 9.31[kJ/m^2]  // Fracture toughness
  Density = 0[kg/m^3]  // Material density
  factor_a = 0.4
  factor_b = 1e-8
  Kesai_cr = 5e-3  // Critical value
  Fna = 2
  Fnb = 1
  l0 = 0.041[mm]  // Length scale
  l_fine = 0.04[mm]
  l_coarse = 0.5[mm]
  k = 1e-9  // Numerical sigularity control factor
  delta = 1e-9  // Perturbation
  delta_u = 8e-4[mm]
  Load = 1.6[mm]
  n_steps = Load/delta_u
  para = 0[1]

Functions
  pw1: Piecewise "Hardening degradation function" | funcname = pw; pieces = {0, factor_a, ((1-factor_b)/factor_a^2)*(x-factor_a)^2+factor_b}; argunit = 1; fununit = 1

Variables
  var1 "Variables"
    es11 = solid.eXX - extmat.state.eplast1
    es22 = solid.eYY - extmat.state.eplast2
    es33 = solid.eZZ - extmat.state.eplast3
    es23 = solid.eYZ - extmat.state.eplast4
    es13 = solid.eXZ - extmat.state.eplast5
    es12 = solid.eXY - extmat.state.eplast6
    I1 = es11 + es22 + es33
    fai_p = (Kb*(es11/2 + es22/2 + es33/2 + abs(es11 + es22 + es33)/2)^2)/2 + Mu*((es11/3 + es22/3 - (2*es33)/3)^2 + (es11/3 - (2*es22)/3 + es33/3)^2 + (es22/3 - (2*es11)/3 + es33/3)^2 + 2*es12^2 + 2*es13^2 + 2*es23^2)
    f_kesai = comp.pw(extmat.state.epeff1-Kesai_cr)

Couplings
  aveop1: Average "Suface average" on boundaries 4 | opname = Saveop
  intop1: Integration "Suface integration" on boundaries 4 | opname = Sintop; intorder = 2; frame = material

Coordinate systems
  sys1: Boundary "Boundary System" | name = sys

Geometry
  geom1 "Geometry" (2D, length unit mm)
    r1: Rectangle | base = center; size = {width, 50}
    c1: Circle "Circle left" | pos = {-9, 0}; rot = -90; r = 2.5; angle = 180
    c2: Circle "Circle right" | pos = {9, 0}; rot = 90; r = 2.5; angle = 180
    pol1: Polygon "Polygon top" | type = open; source = table; table = {{-9, 1.5}, {9, 1.5}}
    pol2: Polygon "Polygon bottom" | type = open; source = table; table = {{-9, -1.5}, {9, -1.5}}
    pol3: Polygon "Polygon center H" (disabled) | type = open; source = table; table = {{-9, 0}, {9, 0}}
    pol4: Polygon "Polygon center V" (disabled) | type = open; source = table; table = {{0, -1.5}, {0, 1.5}}
    dif1: Difference | input = r1; input2 = c1, c2, pol1, pol2, pol3
    fin: Finalize "Form Union"

Materials
  extmat: External "Linear hardening with Mises yielding"
    comcomsolgeneralStressStrain "General stress-strain relation"
      par = {Kb, Mu, Sigma_y, Hm, comp.d, Fna, Fnb}

Physics
  solid: SolidMechanics on all domains
    dependent variable u = {u, v, w}
    ShapeProperty.order_displacement = 1
    Type2D.enable_bending = 0
    d.d = thickness
    StructuralTransientBehavior.StructuralTransientBehavior = Quasistatic
    lemm1: LinearElasticModel "Linear Elastic Material" (default)
      D_mat = userdef
      D = {g1111, g1122, g1133, g1112, g1123, g1113, g1122, g2222, g2233, g2212, g2223, g2213, g1133, g2233, g3333, g3312, g3323, g3313, g1112, g2212, g3312, g1212, g1223, g1213, g1123, g2223, g3323, g1223, g2323, g2313, g1113, g2213, g3313, g1213, g2313, g1313}
      IsotropicOption = KG
      K_mat = userdef
      K = 0
      G_mat = userdef
      G = 0
      rho_mat = userdef
      rho = Density
    free1: Free (default)
    init1: init "Initial Values" (default)
    fix1: Fixed "Fixed point" on points 1
    disp1: Displacement1 "Prescribed bottom" on boundaries 2 | Direction = {0, 1, 0}
    disp4: Displacement1 "Prescribed top" on boundaries 4 | Direction = {0, 1, 0}; U0 = {0, Load*para, 0}
    essr1: ExternalStressStrainRelation on all domains | ForceLinearStrainRes = 1; material = extmat
  hzeq: HelmholtzEquation "Phase field" on domains 1-3
    dependent variable d
    ShapeProperty.order = 1
    Units.CustomSourceTermUnit = 1
    heq1: HelmholtzEquation "Strong form (Helmholtz)" (default)
      c = {4*f_kesai*l0^2, 0, 0, 4*f_kesai*l0^2}
      a = 4*H*l0*(1-k)/Gc0+f_kesai
      f = 4*H*l0*(1-k)/Gc0
    zflx1: ZeroFluxBoundary "Zero Flux" (default)
    init1: init "Initial Values" (default)
    cfeq1: CoefficientFormPDE "Strong form (General)" (disabled) on all domains
      c = {4*f_kesai*l0^2, 0, 0, 4*f_kesai*l0^2}
      a = 4*H*l0*(1-k)/Gc0+f_kesai
      f = 4*H*l0*(1-k)/Gc0
      da = 0
      be = {-4*l0^2*d(f_kesai,x), -4*l0^2*d(f_kesai,y)}
  dode: DomainODE "Domain ODEs and DAEs" on domains 1-3
    dependent variable H
    ShapeProperty.shapeFunctionType = shgp
    Units.DependentVariableQuantity = none
    Units.CustomDependentVariableUnit = J/m^3
    Units.CustomSourceTermUnit = J/m^3
    dode1: DistributedODE (default) | f = H-nojac(if(fai_p>H,fai_p,H)); da = 0
    init1: init "Initial Values" (default)

Mesh
  mesh1 "Mesh"
    size: MeshSizeDefault | hmax = 3.35; hmin = 0.015; hcurve = 0.3; hgrad = 1.3
    map1: Map "Fracture zone(mapped)" on domains 3
      size1: Size on domains 3 | hmax = l_fine; custom = on
    map2: Map "Other zone (mapped)" (disabled) on domains 1, 2
      size1: Size on domains 1, 2 | hmax = l_coarse; custom = on
    fq1: FreeQuad "Other zone (free)" on domains 1, 2
      size1: Size on domains 1, 2 | hmax = l_coarse; custom = on

Studies
  std1 "Study"
    stat: Stationary | useparam = on; pname = para; plistarr = range(0, 1/n_steps, 1); punit = 1

Solver configurations
  sol1 "Solution" (study std1)
    v1: Variables "Dependent Variables"
    s1: Stationary "Stationary Solver" | stol = 1e-6
      dDef: Direct
      pDef: Parametric | pname = para; plistarr = range(0, 1/n_steps, 1); punit = 1
        ps1: PreviousSolution "Strain energy history" | prevcomp = {comp_H}
      se1: Segregated "Staggered solver" | maxsegiter = 300; segstabacc = segaacc; segaaccdim = 50
        ss1: SegregatedStep "Phase field" | segvar = {comp_d}
        ssDef: SegregatedStep "Displacement field" | segvar = {comp_u}
        ss2: SegregatedStep "Strain energy field" | segvar = {comp_H}

Datasets
  dset3: Solution | solution = sol1

Tables
  tbl1: Table "Reference"
    Column 1 | Column 2
    0 | 0
    0.0238806 | 0.700186
    0.0334328 | 0.953445
    0.0453731 | 1.26629
    0.0573134 | 1.62384
    0.0716418 | 1.99628
    0.0835821 | 2.33892
    0.0979104 | 2.72626
    0.109851 | 3.0689
    0.119403 | 3.33706
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
Plots
  pg1: PlotGroup2D "Mises stress" | data = dset3
    surf1: Surface "Surface plot" | expr = solid.mises; unit = MPa
      def1: Deform "Deformation" (disabled) | expr = {u, v}
  pg2: PlotGroup2D "Phase field" | data = dset3
    surf1: Surface "Surface plot" | expr = d
      filt1: Filter (disabled) | expr = d<0.99
  pg4: PlotGroup2D "f_kesai" | data = dset3
    surf1: Surface "Surface plot" | expr = f_kesai
  pg6: PlotGroup2D "Boundary contours" | data = dset3
    line1: Line "Boundary plot" | expr = solid.SYY; unit = MPa
      sel1: Selection on boundaries 4
  pg5: PlotGroup2D "Other contours" | data = dset3
    surf1: Surface "Surface plot" | expr = extmat.state.epeff1
  pg3: PlotGroup1D "Load-displacement curve" | data = dset3
    tblp1: Table "Reference" | table = tbl1; plotcolumninput = manual
    glob1: Global "Line plot" | expr = Sintop(solid.SYY)*0.00102[m]; unit = kN; xdata = expr; xdataexpr = Saveop(comp.v)

Exports
  plot1: Plot "SD curve" | filename = E:\DoCFEA\Analysis\GZU_work\Journal_2_DFA\Ambati_study\data.dat
  plot2: Plot | filename = E:\DoCFEA\Analysis\GZU_work\Journal_2_DFA\Yin_notched_hole\data.txt